package omp 4
suffix omp

boundary p p f
units real
atom_style full
bond_style harmonic
angle_style harmonic
pair_style lj/cut/tip4p/long O H O-H H-O-H 0.1546 12.0
kspace_style pppm/tip4p 1.0e-5
kspace_modify slab 3.0

read_data equilibrate.data

include parameters.inc
include groups.inc

compute Tfluid fluid temp/partial 0 1 1
fix mynvt1 fluid nvt temp 300 300 100
fix_modify mynvt1 temp Tfluid

compute Twall wall temp/partial 0 1 1
fix mynvt2 wall nvt temp 300 300 100
fix_modify mynvt2 temp Twall

fix myshk H2O shake 1.0e-5 200 0 b O-H a H-O-H
fix myrct all recenter NULL NULL 0
fix myspring wall spring/self 10.0 xyz                  ## SPRING FORCE FOR THE IMMOBILE WALL


fix myadf fluid addforce 3e-2 0.0 0.0                   ## FORCE ADDED


#   fix mysf1 walltop setforce 0 NULL NULL
#   fix mysf2 wallbot setforce 0 NULL NULL
#   velocity wallbot set 0 NULL NULL
#   velocity walltop set 0 NULL NULL

#    dump mydmp all image 500 myimage-*.ppm type type shiny 0.1 box no 0.01 view 90 0 zoom 1.8
#    dump_modify mydmp backcolor white acolor O red adiam O 2 acolor H white adiam H 1 &
#       acolor Na+ blue adiam Na+ 2.5 acolor Cl- cyan adiam Cl- 3 acolor WALL gray adiam WALL 3

# minimize      1.0e-4 1.0e-6 1000 100000


dump mydmp all atom 5000 dump.lammpstrj

thermo 500
thermo_modify temp Tfluid

variable vcm_fluid equal vcm(fluid,x)                       ## VELOCITY CALCULATION IN THE X-DIR
fix myat1 all ave/time 10 100 1000 v_vcm_fluid file vcm_fluid.dat


thermo_style custom step temp pe ke etotal press


compute cc1 H2O chunk/atom bin/1d z 0.0 0.25
compute cc2 wall chunk/atom bin/1d z 0.0 0.25
compute cc3 ions chunk/atom bin/1d z 0.0 0.25

fix myac1 H2O ave/chunk 10 15000 200000 &
cc1 density/mass vx file shearing-water.dat
fix myac2 wall ave/chunk 10 15000 200000 &
cc2 density/mass vx file shearing-wall.dat
fix myac3 ions ave/chunk 10 15000 200000 &
cc3 density/mass vx file shearing-ions.dat

timestep 1.0
run 200000
